// COMSOL Multiphysics 6.0.0.318 model "dielSphereSWMatlabJiAxisym.mph"
// Outline of the model tree

Parameters
  t_air = lam0/2  // thickness of air around circum sphere
  t_pml = lam0/2  // thickness of PML
  h_size = 15  // tumber of elements per wavelength
  ka = 1  // electric size
  wx = 0.1 [m]  // patch size
  wy = wx/2  // patch size
  a = sqrt((wx/2)^2+(wy/2)^2)  // circum sphere
  k0 = ka/a  // wavenumber
  lam0 = 2*pi/k0  // wavelength
  f0 = c_const/lam0  // frequency
  sWind = 5  // index of spherical wave
  m = mSWaxisym(sWind, ka)  // azimuthal order
  sgn = sigmaSgnSWaxisym(sWind, ka)  // sign of azimuthal order

Functions
  extm1: MATLAB
    funcs = 
      {JiSWaxisym, kx, ky, kz, k0, ka, sWind, component}
      {mSWaxisym, sWind, ka}
      {sigmaSgnSWaxisym, sWind, ka}

Coordinate systems
  pml1: PML "Perfectly Matched Layer 1" on domains 1, 5

Geometry
  geom1 "Geometry 1" (2D axisymmetric, length unit m)
    c1: Circle | layername = {Layer 1, Layer 2}; layer = {t_pml, t_air}; r = a+t_air+t_pml
    fin: Finalize "Form Union"

Materials
  mat1: Common "Air" on all domains
    def "Basic"
      thermalexpansioncoefficient = alpha_p(pA,T)
      molarmass = 0.02897[kg/mol]
      bulkviscosity = muB(T)
      relpermeability = 1
      relpermittivity = 1
      dynamicviscosity = eta(T)
      ratioofspecificheat = 1.4
      electricconductivity = 0[S/m]
      heatcapacity = Cp(T)
      density = rho(pA,T)
      thermalconductivity = k(T)
      soundspeed = cs(T)
      eta: Piecewise | arg = T; pieces = {200.0, 1600.0, -8.38278E-7+8.35717342E-8*T^1-7.69429583E-11*T^2+4.6437266E-14*T^3-1.06585607E-17*T^4}; argunit = K; fununit = Pa*s
      Cp: Piecewise | arg = T; pieces = {200.0, 1600.0, 1047.63657-0.372589265*T^1+9.45304214E-4*T^2-6.02409443E-7*T^3+1.2858961E-10*T^4}; argunit = K; fununit = J/(kg*K)
      rho: Analytic | expr = pA*0.02897/R_const[K*mol/J]/T; args = {pA, T}; fununit = kg/m^3; argunit = {Pa, K}
      k: Piecewise | arg = T; pieces = {200.0, 1600.0, -0.00227583562+1.15480022E-4*T^1-7.90252856E-8*T^2+4.11702505E-11*T^3-7.43864331E-15*T^4}; argunit = K; fununit = W/(m*K)
      cs: Analytic | expr = sqrt(1.4*R_const[K*mol/J]/0.02897*T); args = T; fununit = m/s; argunit = K
      an1: Analytic | funcname = alpha_p; expr = -1/rho(pA,T)*d(rho(pA,T),T); args = {pA, T}; fununit = 1/K; argunit = {Pa, K}
      an2: Analytic "Analytic 2a" | funcname = muB; expr = 0.6*eta(T); args = T; fununit = Pa*s; argunit = K
    RefractiveIndex
      n = 1
      ki = 0
    NonlinearModel
      BA = (def.gamma+1)/2
    idealGas
      Rs = R_const/Mn
      heatcapacity = Cp(T)
      ratioofspecificheat = 1.4
      molarmass = 0.02897
      Cp: Piecewise | arg = T; pieces = {200.0, 1600.0, 1047.63657-0.372589265*T^1+9.45304214E-4*T^2-6.02409443E-7*T^3+1.2858961E-10*T^4}; argunit = K; fununit = J/(kg*K)
  mat2: Common "Material 2" on domains 3
    def "Basic"
      relpermeability = 1
      electricconductivity = 0
    LossTangentDF "Loss tangent, dissipation factor"
      tanDelta = 0
      epsilonPrim = 3

Physics
  emw: ElectromagneticWaves "Electromagnetic Waves, Frequency Domain" on all domains
    dependent variable E = {Er, Ephi, Ez}
    outofplanewavenumber.mFloquet = m*sgn
    wee1: WaveEquationElectric (default)
    axi1: AxialSymmetry (default)
    pec1: PerfectElectricConductor (default)
    init1: init "Initial Values 1" (default)
    ecd1: ExternalCurrentDensity on domains 3
      Je = {JiSWaxisym(k0*r*cos(0), k0*r*sin(0), k0*z, k0*1[m], ka, sWind, 1), JiSWaxisym(k0*r*cos(0), k0*r*sin(0), k0*z, k0*1[m], ka, sWind, 2), JiSWaxisym(k0*r*cos(0), k0*r*sin(0), k0*z, k0*1[m], ka, sWind, 3)}
    sctr1: Scattering "Scattering Boundary Condition 1" on boundaries 8, 13

Mesh
  mesh1 "Mesh 1"
    size: MeshSizeDefault | hmax = lam0/15; hmin = lam0/25
    size1: Size on domains 3 | hmax = lam0/25; hmin = lam0/25
    dis1: Distribution on boundaries 1, 5, 7 | type = predefined; elemcount = 10
    ftri1: FreeTri "Free Triangular 1" on domains 2-4 | smoothmaxiter = 4; smoothmaxdepth = 4
    map1: Map "Mapped 1" on domains 1, 5 | smoothmaxiter = 4; smoothmaxdepth = 4; adjustedgdistr = on

Studies
  std1 "Study 1"
    freq: Frequency "Frequency Domain" | punit = GHz; plist = f0

Solver configurations
  sol1 "Solution 1" (study std1)
    v1: Variables "Dependent Variables 1"
    s1: Stationary "Stationary Solver 1" | stol = 0.01
      p1: Parametric | pname = freq; plistarr = f0; punit = GHz; pcontinuationmode = no
      fc1: FullyCoupled | linsolver = d1
      d1: Direct "Suggested Direct Solver (emw)" | linsolver = pardiso

Datasets
  dset1: Solution | solution = sol1
  rev1: Revolve2D "Revolution 2D" | data = dset1; startangle = -90; revangle = 225

Plots
  pg1: PlotGroup2D "Electric Field (emw)" | data = dset1; dataisaxisym = on
    surf1: Surface | expr = real(emw.Ephi)